# Frekvens:
f_1 := 876.02
ω_1 := 2*π*f_1 = 5504.2
f_2 := 43224.02
ω_2 := 2*π*f_2 = 271585
# Radius:
r_z := 1
r_p := 0.9
# Nulpunkter og poler:
z_1 := r_z*e^(1j*ω_1) = 0.992115 + 0.125333i
z_2 := conj(z_1) = 0.992115 - 0.125333i
p_1 := r_p*e^(1j*ω_1) = 0.892903 + 0.1128i
p_2 := conj(p_1) = 0.892903 - 0.1128i
# Overføringsfunktion:
H(z) == (z - z_1)*(z - z_2)/((z - p_1)*(z - p_2)) float, 3 → H(z) == (z - (0.992 + 0.125i))*(z - (0.992 - 0.125i))/((z - (0.893 + 0.113i))*(z - (0.893 - 0.113i)))
(z - (0.992 + 0.125i))*(z - (0.992 - 0.125i))
z*z - z*(0.992 - 0.125i) - (0.992 + 0.125i)*z + (0.992 + 0.125i)*(0.992 - 0.125i)
z^2 - z*((0.992 - 0.125i) + (0.992 + 0.125i)) + 1
z^2 - z*1.984 + 1  # Udtryk i tæller
(z - (0.893 + 0.113i))*(z - (0.893 - 0.113i))
z^2 - z*((0.893 - 0.113i) + 0.893 + 0.113i) + (0.893 + 0.113i)*(0.893 - 0.113i)
z^2 - z*1.786 + 0.81  # Udtryk i nævner
H(z) == (z^2 - z*1.98 + 1)/(z^2 - 1.79*z + 0.81)  # Overføringsfunktion simplificeret
H(z) == Y(z)/X(z) == (1 - 1.98*z^-1 + z^-2)/(1 - 1.79*z^-1 + 0.81*z^-2)  # Dividerer igennem med z
# Differensligning
Y(z)*(1 - 1.79*z^-1 + 0.81*z^-2) == X(z)*(1 - 1.98*z^-1 + z^-2)
Y(z) - 1.79*Y(z)*z^-1 + 0.81*Y(z)*z^-2 == X(z) - 1.98*X(z)*z^-1 + X(z)*z^-2
Y(z) == X(z) - 1.98*X(z)*z^-1 + X(z)*z^-2 + 1.79*Y(z)*z^-1 - 0.81*Y(z)*z^-2
y(n) == x(n) - 1.98*x(n - 1) + x(n - 2) + 1.79*y(n - 1) - 0.81*y(n - 2)
z*z - z*(0.992 - 0.125i) - (0.992 + 0.125i)*z + (0.992 + 0.125i)*(0.992 - 0.125i)
z^2 - z*((0.992 - 0.125i) + (0.992 + 0.125i)) + 1
(z - r_z*e^(1j*ω_1))*(z - conj(r_z*e^(1j*ω_1)))/((z - (r_p*e^(1j*ω_1)))*(z - conj(r_p*e^(1j*ω_1))))
z^2 - z*((r_z*e^(1j*ω_1)) + conj(r_z*e^(1j*ω_1))) + (r_z*e^(1j*ω_1))*conj(r_z*e^(1j*ω_1))
z^2 - z*((r_z*e^(1j*ω_1)) + conj(r_z*e^(1j*ω_1))) + 1
z^2 - z*((r_p*e^(1j*ω_1)) + conj(r_p*e^(1j*ω_1))) + 0.81
(z^2 - z*((r_z*e^(1j*ω_1)) + conj(r_z*e^(1j*ω_1))) + 1)/(z^2 - z*((r_p*e^(1j*ω_1)) + conj(r_p*e^(1j*ω_1))) + 0.81)
round(-1.9890/2*2^15) = -32588
(1 - z^-1*((r_z*e^(1j*ω_1)) + conj(r_z*e^(1j*ω_1))) + z^-2)/(1 - z^-1*((r_p*e^(1j*ω_1)) + conj(r_p*e^(1j*ω_1))) + z^-2)
round(-1.7901/2*2^15) = -29329
